# Worksheet setting: ORIGIN = 1
# Лабораторная работа №3
# Классная работа
# Численное решение нелинейных уравнений
# Вариант №2
f(x) := □  # error: Пустой местозаполнитель.
f(x) := 3*x^4 + 4*x^3 - 12*x^2 - 5
φ(x) := sqrt((3*x^4 + 4*x^3 - 5)/12)
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x1 := -4
root(f(x1), x1) = -2.82385
x2 := 2
root(f(x2), x2) = 1.59209
ε := 0.00001
mpd(a, b, f, ε) :=
    return "Корней нет" if f(a)*f(b) > 0
    n ← 0
    while |b - a| > ε
        x ← (a + b)/2
        n ← n + 1
        break if f(x) == 0
        b ← x if f(a)*f(x) < 0
        a ← x otherwise
    [n; x; f(x)]
mpd1(a, b, f, ε) :=
    return "Корней нет" if f(a)*f(b) > 0
    n ← 0
    while |b - a| > ε
        x ← (a + b)/2
        n ← n + 1
        break if f(x) == 0
        b ← x if f(a)*f(x) < 0
        a ← x otherwise
        M[n, 1] ← n
        M[n, 2] ← x
        M[n, 3] ← f(x)
    M
mpd1(-4, -2, f, ε) = [
    1, -3, 22;
    2, -2.5, -25.3125;
    3, -2.75, -7.36328;
    4, -2.875, 5.71948;
    5, -2.8125, -1.19942;
    6, -2.84375, 2.16292;
    7, -2.82812, 0.457818;
    8, -2.82031, -0.37674;
    9, -2.82422, 0.0390486;
    10, -2.82227, -0.169218;
    11, -2.82324, -0.0651776;
    12, -2.82373, -0.0130878;
    13, -2.82397, 0.0129746;
    14, -2.82385, -5.80902e-5;
    15, -2.82391, 0.00645787;
    16, -2.82388, 0.0031998;
    17, -2.82387, 0.00157083;
    18, -2.82386, 0.000756365
]
mpd(-4, -2, f, ε) = [18; -2.82386; 0.000756365]
mpd(1, 3, f, ε) = [18; 1.59209; 0.000258295]
p := mpd1(-4, -2, f, ε)
p1 := mpd1(1, 3, f, ε)
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p3 := mpd1(1, 3, f, ε)
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# Метод касательный
MK(a, b, f, ε, nmax) :=
    n ← 0
    x ← a if f(a)*d^2/da^2(f(a)) > 0
    x ← b otherwise
    h ← 2*ε
    while |h| > ε and n ≤ nmax
        h ← -f(x)/(d/dx(f(x)))
        x ← x + h
        n ← n + 1
        M[n, 1] ← n
        M[n, 2] ← x
        M[n, 3] ← f(x)
    M
MK(-4, -2, f, ε, 100) = [
    1, -3.34375, 86.3124;
    2, -2.97522, 18.501;
    3, -2.84155, 1.91982;
    4, -2.82413, 0.0299413;
    5, -2.82385, 7.67516e-6;
    6, -2.82385, 0
]
f(1.18883416519) = -9.2466
root(f(x2), x2) = 1.59209
root(f(x1), x1) = -2.82385
MK(1, 3, f, ε, 100) = [
    1, 2.33889, 70.3097;
    2, 1.90767, 18.8303;
    3, 1.67575, 3.78226;
    4, 1.60003, 0.32596;
    5, 1.59217, 0.00327982;
    6, 1.59209, 3.43437e-7;
    7, 1.59209, 0
]
f(-0.653018390351) = -10.6855
# Метод итераций
iterations(x, φ, f, ε, nmax) :=
    n ← 0
    while 1
        x0 ← x
        x ← φ(x)
        n ← n + 1
        M[n, 1] ← n
        M[n, 2] ← x
        M[n, 3] ← f(x)
        break if |x - x0| ≤ ε or n > nmax
    return M
a := 1
b := 3
P := iterations(1, φ, f, ε, 20) = [
    1, 0.408248, -6.6445;
    2, 0.622127i, 0.0939051 - 0.963156i;
    3, 0.0648112 - 0.619207i, -0.334423 + 2.06422i;
    4, 0.0714584 + 0.642021i, 0.00492102 - 2.34438i;
    5, 0.0805945 - 0.642783i, -0.0534511 + 2.50834i;
    6, 0.0815483 + 0.646358i, 0.000629935 - 2.55363i;
    7, 0.0830489 - 0.646509i, -0.0089789 + 2.58085i;
    8, 0.0832064 + 0.647108i, 0.000101376 - 2.58847i;
    9, 0.0834596 - 0.647134i, -0.00152056 + 2.59307i;
    10, 0.0834862 + 0.647235i, 1.70403e-5 - 2.59436i;
    11, 0.0835291 - 0.647239i, -0.000257856 + 2.59514i;
    12, 0.0835336 + 0.647257i, 2.88602e-6 - 2.59536i;
    13, 0.0835409 - 0.647257i, -4.37371e-5 + 2.59549i;
    14, 0.0835416 + 0.64726i, 4.89417e-7 - 2.59553i;
    15, 0.0835429 - 0.64726i, -7.4189e-6 + 2.59555i;
    16, 0.083543 + 0.647261i, 8.30143e-8 - 2.59556i;
    17, 0.0835432 - 0.647261i, -1.25844e-6 + 2.59556i;
    18, 0.0835432 + 0.647261i, 1.40813e-8 - 2.59556i;
    19, 0.0835432 - 0.647261i, -2.13465e-7 + 2.59557i;
    20, 0.0835433 + 0.647261i, 2.38856e-9 - 2.59557i;
    21, 0.0835433 - 0.647261i, -3.62093e-8 + 2.59557i
]
root(f(x), x, a, b) = 1.59209
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