# Worksheet setting: ORIGIN = 1
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# 0.60x1 - 0.35x2 - 0.25x3 = 1.83
# 0.21x1 - 0.45x2 - 0.20x3 = 1.97
# 0.30x1 + 0.25x2 + 0.43x3 = 0.32
A := [0.21, -0.45, -0.2; 0.30, 0.25, 0.43; 0.60, -0.35, -0.25]
b := [1.97; 0.32; 1.83]
A0 := [0.60, -0.35, -0.25; 0.21, -0.45, -0.20; 0.30, 0.25, 0.43]
b0 := [1.83; 1.97; 0.32]
A1 := [0.60, -0.35, -0.25; 0.21, -0.45, -0.20; 0, -0.85, -1.11]
b1 := [1.83; 1.97; 1.19]
lsolve(A, b) = [1.27964; -5.00885; 2.76353]
lsolve(A1, b1) = [1.27964; -5.00885; 2.76353]
s(A, b) :=
    c ← augment(A1, b1)
    d ← rref(c)
    x ← submatrix(d, 1, 3, 4, 4)
s(A1, b1) = [1.27964; -5.00885; 2.76353]
s(A, b) = [1.27964; -5.00885; 2.76353]
Gauss(A, b, n) :=
    for i ∈ 1 .. n
        for j ∈ 1 .. n
            A0[i, j] ← A[i, j]
        b0[i] ← b[i]
    for k ∈ 1 .. n - 1
        if A[k, k] == 0
            m ← k + 1
            while m ≤ n and A[m, k] == 0
                m ← m + 1
            return "система не обусловлена" if m > n
            for j ∈ 1 .. n
                R ← A[m, j]
                A[m, j] ← A[k, j]
                A[k, j] ← R
            R ← b[m]
            b[m] ← b[k]
            b[k] ← R
        for i ∈ k + 1 .. n
            q[i] ← A[i, k]/A[k, k]
            for j ∈ k .. n
                A[i, j] ← A[i, j] - q[i]*A[k, j]
            b[i] ← b[i] - q[i]*b[k]
    x[n] ← b[n]/A[n, n]
    for i ∈ n - 1, n - 2 .. 1
        s ← 0
        for j ∈ i + 1 .. n
            s ← s + A[i, j]*x[j]
        x[i] ← (b[i] - s)/A[i, i]
    for i ∈ 1 .. n
        s ← 0
        for j ∈ 1 .. n
            s ← s + A0[i, j]*x[j]
        δ[i] ← b0[i] - s
    [x; A; δ]
# Прямой ход
# Обратный ход
Gauss(A, b, 3) = [
    [1.27964; -5.00885; 2.76353]; [0.21, -0.45, -0.2; 0, 0.892857, 0.715714; 0, 0, -0.42864]; [-2.22045e-16; 3.88578e-16; 0]
]
lsolve(A, b) = [1.27964; -5.00885; 2.76353]
MI(A, B, n, ε, kmax) :=
    k ← 0
    for i ∈ 1 .. n
        X[i] ← 0
    δ ← 2*ε
    while k ≤ kmax and δ > ε
        k ← k + 1
        for i ∈ 1 .. n
            X0[i] ← X[i]
        for i ∈ 1 .. n
            S ← 0
            for j ∈ 1 .. n
                S ← S + (A[i, j]*X0[j]) if i ≠ j
            X[i] ← 1/A[i, i]*(B[i] - S)
            l[i] ← |X[i] - X0[i]|
        m ← l[1]
        for i ∈ 1 .. n
            m ← l[i] if l[i] > m
        δ ← m
        M[k, 1] ← k
        for i ∈ 1 .. n
            M[k, i + 1] ← X[i]
        M[k, n + 2] ← δ
    M
lsolve(A1, b1) = [1.27964; -5.00885; 2.76353]
MI(A1, b1, 3, 10^-5, 150) = [
    1, 3.05, -4.37778, -1.07207, 4.37778;
    2, 0.0495996, -2.47797, 2.28028, 3.35235;
    3, 2.55464, -5.36809, 0.825471, 2.89012;
    4, 0.262561, -3.55249, 3.03863, 2.29207;
    5, 2.24381, -5.60575, 1.6483, 2.05326;
    6, 0.466772, -4.06325, 3.22062, 1.77704;
    7, 2.0217, -5.59134, 2.03942, 1.55493;
    8, 0.638146, -4.34073, 3.20958, 1.38355;
    9, 1.85523, -5.50646, 2.25191, 1.21709;
    10, 0.776196, -4.51285, 3.14458, 1.07904
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]
C := transpose(A)*A
d := transpose(A)*b
lsolve(A, b) = [1.27964; -5.00885; 2.76353]
d = [1.6077; -1.447; -0.7139]
lsolve(C, d) = [1.27964; -5.00885; 2.76353]
C = [0.4941, -0.2295, -0.063; -0.2295, 0.3875, 0.285; -0.063, 0.285, 0.2874]
MI(C, d, 3, 10^-5, 150) =  # no stored result
MI(A, b, 3, 10^-5, 150) =  # no stored result
MI(A1, b1, 3, 10^-5, 50) = [
    1, 3.05, -4.37778, -1.07207, 4.37778;
    2, 0.0495996, -2.47797, 2.28028, 3.35235;
    3, 2.55464, -5.36809, 0.825471, 2.89012;
    4, 0.262561, -3.55249, 3.03863, 2.29207;
    5, 2.24381, -5.60575, 1.6483, 2.05326;
    6, 0.466772, -4.06325, 3.22062, 1.77704;
    7, 2.0217, -5.59134, 2.03942, 1.55493;
    8, 0.638146, -4.34073, 3.20958, 1.38355;
    9, 1.85523, -5.50646, 2.25191, 1.21709;
    10, 0.776196, -4.51285, 3.14458, 1.07904
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]
