# Лабораторная работа №2
# Задание №1
# a | б
x := 11.445
y := 2.043
Δy := 0.001
Δx := 0.001/2 = 0.0005
δy := |Δy/y|*100 = 0.0489476
δx := |Δx/x|*100 = 0.00436872
# Абсол погрешность числа х : Δx = 0.0005
# Относ погрешность числа х : δx = 0.004
# Абсол погрешность числа y : Δy = 0.001
# Относ погрешность числа y : δy = 0.049
# Задание №2
a := 0.317
b := 3.27
c := 4.7561
z := 4*sqrt(a + b)/(a*b - c)
Δa := 0.0005
δa := |Δa/a|*100 = 0.157729
Δb := 0.005
δb := |Δb/b|*100 = 0.152905
Δc := 0.00005
# 1 )
δc := |Δc/c|*100 = 0.00105128
a1 := a + b = 3.587
Δa1 := Δa + Δb = 0.0055
Δa1 < 0.05 = 1
a1 := 3.59
# 2 )
a2 := 4*sqrt(a1) = 7.57892
Δa2 := |d/da1(4*sqrt(a1))|*Δa1 = 0.00580558
Δa2 < 0.05 = 1
a2 := 7.58
# 3 )
a3 := a*b = 1.03659
Δa3 := Δa*b + a*Δb = 0.00322
Δa3 < 0.005 = 1
a3 := 1.037
# 4 )
a4 := a3 - c = -3.7191
Δa4 := Δc + Δa3 = 0.00327
Δa4 < 0.005 = 1
a4 := -3.719
# 5 )
a5 := a2/a4 = -2.03818
Δa5 := (Δa2*|a4| + a2*Δa4)/a4^2 = 0.00335317
Δa5 < 0.005 = 1
a5 := -2.038
δa := |Δa/a|*100 = 0.157729
δb := |Δb/b|*100 = 0.152905
δz := |Δa5/a5|*100 = 0.164532
δc := |Δc/c|*100 = 0.00105128
# ответ. z = -2.038+-0.003
# Задание 3
# 1. С помощью матрицы аппликат М построить поверхность второго порядка
N := 20  # эллипсоид
i := 0 .. N
j := 0 .. N
s := -2
e := 2
aa := 2
bb := 2
cc := 2
h := (e - s)/N
x[i] := s + i*h
y[j] := s + j*h
z(x, y) := sqrt(1 - x^2/aa^2 - y^2/bb^2)*cc
z1(x, y) := -sqrt(1 - x^2/aa^2 - y^2/bb^2)*cc
M1[i, j] := z(x[i], y[j])
M2[i, j] := z1(x[i], y[j])
# [component: inputs M1, M2]
# 2. Построить поверхность с помощью встроенной функции CreateMesh, изобразить ее пятью различными способами.
z2(x, y) := sin(x^2 + y^2)
Q1 := CreateMesh(z2, -5, 5, -5, 5, 20)
# [component: inputs Q1]
# [component: inputs Q1]
# [component: inputs Q1]
# [component: inputs Q1]
# [component: inputs Q1]
# 3. Построить поверхность вращения вокруг осей
a := -5
g(x) := (x^2 + 1)/x
b := 2
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# убрать точку разрыва
# Вращение кривой вокруг оси ОХ
F(u, v) := u
G(u, v) := g(u)*cos(v)
m := 30
H(u, v) := g(u)*sin(v)
X := CreateMesh(F, G, H, a, b, 0, 2*π, m)
# [component: inputs X]
# Вращение кривой вокруг оси OY
F1(u, v) := u*sin(v)
G1(u, v) := u*cos(v)
H1(u, v) := g(u)
m := 30
Y := CreateMesh(F1, G1, H1, a, b, -π, π, m)
# [component: inputs Y]
cosh(□)
# 4. Построение графика поверхности заданной параметрически
N := 30
i := 0 .. N
j := 0 .. N
φ[i] := -2 + 4/N*i
θ[j] := 2*π/N*j
X[i, j] := cosh(φ[i])*cos(θ[j])
Y[i, j] := cosh(φ[i])*sin(θ[j])
Z[i, j] := φ[i]
# [component: inputs (X, Y, Z)]
Катеноид
# 5. Построить поверхность, заданную в виде вектора параметрических функций.
# Эллипcоид
a3 := 4
b3 := 3
c3 := 2
P(θ, ϕ) := [a3*sin(θ)*cos(ϕ); b3*sin(θ)*sin(ϕ); c3*cos(θ)]
# [component: inputs P]
# 6. Построить линию в пространстве (спираль), заданную параметрически.
t := 1 .. 30
a := 1
b := 3
c := 2
xx[t] := a*t + c
yy[t] := b*t
zz[t] := c*t
# [component: inputs (xx, yy, zz)]
# 7. Построить многогранник.
M := Polyhedron("#1")
# [component: inputs M]
