# Лабораторная работа № 5
#
# «Численное интегрирование»
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f1(x) := sqrt(1 + cos(x)^2)
f2(x) := 5/(4*x - 3)^2
c := 4
v := 5
c1 := 0
v1 := 3
x1 := c, c + 0.1 .. v
x2 := c1, c1 + 0.1 .. v1
xx := -5, -4.99 .. 5
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# определенный интеграл
I2 := integral(f2(x), x = 4 .. 5) = 0.0226244
I1 := integral(f1(x), x = 0 .. 3) = 3.62029
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# длинa дуги
l1 := integral(sqrt(1 + (d/dx(f1(x)))^2), x = 0 .. 3) = 3.13047
l2 := integral(sqrt(1 + (d/dx(f2(x)))^2), x = 4 .. 5) = 1.00008
# объем тела вращения
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V1 := π*integral(f1(x)^2, x = 0 .. 3) = 13.9177
V2 := integral(f2(x)^2, x = 4 .. 5) = 0.000524218
# площадь тела вращения
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P2 := 2*π*integral(f2(x)*sqrt(1 + (d/dx(f2(x)))^2), x = 4 .. 5) = 0.142166
P1 := 2*π*integral(f1(x)*sqrt(1 + (d/dx(f1(x)))^2), x = 0 .. 3) = 23.7326
MPr(a, b, f, n, k) :=
    h ← (b - a)/n
    s ← 0
    a ← a + k*h
    for i ∈ 0 .. n - 1
        s ← s + f(a + i*h)
    s ← h*s
    s
I1 = 3.62029
I2 = 0.0226244
# Погрешность метода левых прямоугольников
A1 := MPr(0, 3, f1, 10, 0) = 3.6221
A2 := MPr(4, 5, f2, 10, 0) = 0.0232471
p1 := |I1 - A1| = 0.00180624
p2 := |I2 - A2| = 0.000622623
d1 := p1/I1*100 = 0.049892
d2 := p2/I2*100 = 2.752
# Погрешность метода правых прямоугольников
A21 := MPr(4, 5, f2, 10, 1) = 0.0220186
A12 := MPr(0, 3, f1, 10, 1) = 3.61998
p12 := |I1 - A12| = 0.000311339
p21 := |I2 - A21| = 0.000605853
d21 := p21/I2*100 = 2.67787
d12 := p12/I1*100 = 0.00859983
# Погрешность метода средних прямоугольников
A13 := MPr(0, 3, f1, 10, 1/2) = 3.61991
A22 := MPr(4, 5, f2, 10, 1/2) = 0.0226202
p22 := |I2 - A22| = 4.19189e-6
p13 := |I1 - A13| = 0.000374781
d13 := p13/I1*100 = 0.0103522
d22 := p22/I2*100 = 0.0185281
MT(a, b, f, n) :=
    h ← (b - a)/n
    s ← 0
    for i ∈ 1 .. n - 1
        s ← s + f(a + i*h)
    s ← h*((f(a) + f(b))/2 + s)
    s
I1 = 3.62029
I2 = 0.0226244
# Погрешность метода трапеции
B := MT(0, 3, f1, 10) = 3.62104
B1 := MT(4, 5, f2, 10) = 0.0226328
pg := |I1 - B| = 0.000747448
pg1 := |I2 - B1| = 8.38536e-6
bet := pg/I1*100 = 0.0206461
bet1 := pg1/I2*100 = 0.0370633
MS(a, b, f, n) :=
    h ← (b - a)/n
    s ← 0
    for i ∈ 0 .. n - 1
        s ← s + (f(a + i*h) + 2*f(a + i*h + h/2))
    s ← h/3*((f(b) - f(a))/2 + s)
    s
# Погрешность метода Симпсона 1
I2 = 0.0226244
I1 = 3.62029
S12 := MS(4, 5, f2, 10) = 0.0226244
S11 := MS(0, 3, f1, 10) = 3.62029
Δ12 := |I2 - S12| = 5.29885e-10
Δ11 := |I1 - S11| = 7.0447e-7
δ12 := Δ12/I2*100 = 2.34209e-6
δ11 := Δ11/I1*100 = 1.9459e-5
MS1(a, b, f, n) :=
    h ← (b - a)/n
    s1 ← 0
    s2 ← 0
    m ← n/2
    for i ∈ 1 .. m
        s1 ← s1 + f(a + (2*i - 1)*h)
    for i ∈ 1 .. m - 1
        s2 ← s2 + f(a + 2*i*h)
    s3 ← h/3*(f(a) + f(b) + 4*s1 + 2*s2)
    s3
# Погрешность метода Симпсона 2
δ12 := Δ12/I2*100 = 2.34209e-6
I2 = 0.0226244
I1 = 3.62029
δ11 := Δ11/I1*100 = 1.9459e-5
S22 := MS1(4, 5, f2, 20) = 0.0226244
S21 := MS1(0, 3, f1, 20) = 3.62029
Δ22 := |I2 - S22| = 5.29885e-10
Δ21 := |I1 - S21| = 7.0447e-7
δ22 := Δ22/I2*100 = 2.34209e-6
δ21 := Δ21/I1*100 = 1.9459e-5
a := 0
a1 := 4
b := 3
b1 := 5
F1(x, y) := x
F(x, y) := x
G1(x, y) := f2(x)*cos(y)
G(x, y) := f1(x)*cos(y)
P1(x, y) := f2(x)*sin(y)
P(x, y) := f1(x)*sin(y)
ZP1 := CreateMesh(F1, G1, P1, a1, b1, 0, 2*π, 30)
ZP := CreateMesh(F, G, P, a, b, 0, 2*π, 30)
# [component: inputs ZP]
# [component: inputs ZP1]
