# Worksheet setting: ORIGIN = 1
# Лабораторная работа №6
#
# «Аппроксимация и интерполяция функций»
# Интерполяция
Gauss(A, b, n) :=
    for i ∈ 1 .. n
        for j ∈ 1 .. n
            A0[i, j] ← A[i, j]
        b0[i] ← b[i]
    for k ∈ 1 .. n - 1
        if A[k, k] == 0
            m ← k + 1
            while m ≤ n and A[m, k] == 0
                m ← m + 1
            return "система не обусловлена" if m > n
            for j ∈ 1 .. n
                R ← A[m, j]
                A[m, j] ← A[k, j]
                A[k, j] ← R
            R ← b[m]
            b[m] ← b[k]
            b[k] ← R
        for i ∈ k + 1 .. n
            q[i] ← A[i, k]/A[k, k]
            for j ∈ k .. n
                A[i, j] ← A[i, j] - q[i]*A[k, j]
            b[i] ← b[i] - q[i]*b[k]
    x[n] ← b[n]/A[n, n]
    for i ∈ n - 1, n - 2 .. 1
        s ← 0
        for j ∈ i + 1 .. n
            s ← s + A[i, j]*x[j]
        x[i] ← (b[i] - s)/A[i, i]
    for i ∈ 1 .. n
        s ← 0
        for j ∈ 1 .. n
            s ← s + A0[i, j]*x[j]
        δ[i] ← b0[i] - s
    [x; A; δ]
n := 6
x := [0.43; 0.48; 0.55; 0.62; 0.70; 0.75]
y := [1.63597; 1.73234; 1.87686; 2.03045; 2.22846; 2.35973]
Lg(x, y, t) :=
    s ← 0
    for i ∈ 1 .. n
        p ← 1
        for j ∈ 1 .. n
            p ← p*(t - x[j])/(x[i] - x[j]) if i ≠ j
        s ← s + y[i]*p
    s  # Полином Лагранжа
p := pspline(x, y)
P(t) := interp(p, x, y, t)
l1 := lspline(x, y) = [0; 3; 0; 0; 3.21293; 0.741808; 4.92597; 1.9522; 0]
c1 := cspline(x, y)
C(t) := interp(c1, x, y, t)
L1(t) := interp(l1, x, y, t)
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n := 8
# Аппроксимация
x1 := [1.20; 1.57; 1.94; 2.31; 2.68; 3.05; 3.42; 3.79]
y1 := [2.59; 2.06; 1.58; 1.25; 0.91; 0.66; 0.38; 0.21]
n := 4
x1 := [-1; 0; 1; 2]
y1 := [1.8; 2.4; 2.2; 2]
# Метод наим квадратов
A := [n, sum(x1[i], i = 1 .. n); sum(x1[i], i = 1 .. n), sum(x1[i]^2, i = 1 .. n)]
b := [sum(y1[i], i = 1 .. n); sum(x1[i]*y1[i], i = 1 .. n)]
A = [4, 2; 2, 6]
b = [8.4; 4.4]
'
Gauss(A, b, 2) = [[2.08; 0.04]; [4, 2; 0, 5]; [0; 0]]
A := augment(x1, y1) = [-1, 1.8; 0, 2.4; 1, 2.2; 2, 2]
A1 := csort(A, 1) = [-1, 1.8; 0, 2.4; 1, 2.2; 2, 2]
x2 := A1[:, 1] = [-1; 0; 1; 2]
y2 := A1[:, 2] = [1.8; 2.4; 2.2; 2]
# Линейная регрессия
a := line(x1, y1) = [2.08; 0.04]  # возвращает массив функции линейной регрессии
intercept(x1, y1) = 2.08  # 2 значения
slope(x1, y1) = 0.04
f(t) := a[1] + a[2]*t
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sum((y1[i] - f(x1[i]))^2, i = 1 .. n) = 0.192
Mx := mean(x1)  # μ - коэффициент корреляции характеризует тесноту линейной связи между абсциссой х и ординатой у и лежит в пределах от -1 до 1
# метод наим квадратов
My := mean(y1)
μ := sum((x1[i] - Mx)*(y1[i] - My), i = 1 .. n)/sqrt(sum((x1[i] - Mx)^2, i = 1 .. n)*sum((y1[i] - My)^2, i = 1 .. n)) = 0.2
corr(x1, y1) = 0.2
# Полиномиальная регрессия
# возвращает вектор коэффициентов полинома к ой степени рассчитаной методо наименьших квадратов для ветора абсцисс х ветора ординах у. элементы массива х упорядоченны по возрастанию
regress(x, y, 2)
interp(s, x, y, t)  # она вычисляет значение полинома в точке т для табличной функции с массивом абсцисс х и ординат у s-массив коэф найденного функцией regress
c := regress(x1, y1, 2)
C(t) := interp(c, x1, y1, t)
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sum((y1[i] - C(x1[i]))^2, i = 1 .. n) = 0.032  # МНК
γ := sqrt(1 - sum((y1[i] - C(x1[i]))^2, i = 1 .. n)/sum((y1[i] - My)^2, i = 1 .. n)) = 0.916515
# Полином 3-ей степени
d := regress(x1, y1, 3)
D(t) := interp(d, x1, y1, t)
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tm
sum((y1[i] - D(x1[i]))^2, i = 1 .. n) = 1.2326e-30
γ := sqrt(1 - sum((y1[i] - D(x1[i]))^2, i = 1 .. n)/sum((y1[i] - My)^2, i = 1 .. n)) = 1
# Аппроксимация с помощью линейной комбинации линейно независимых функций
linfit(x, y, F)  # возращает вектор коэф К для массива абсцисс х и ординах у таблично заданной F ветор функция содержащая набор ЛНЗ функций
F(t) := [1; t; t^3; t^5; t^7]
k := linfit(x1, y1, F)  # error: Число точек данных или выполнений должно быть по меньшей мере равным числу параметров.
z(t) := k*F(t)
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# Данный вариант аппроксимирующей ф-ции наилучш. среди рассмотренных приближает исходную таблично-заданную ф-цию.
sum((y1[i] - z(x1[i]))^2, i = 1 .. n) =  # error: Эта переменная не определена.
γ := sqrt(1 - sum((y1[i] - z(x1[i]))^2, i = 1 .. n)/sum((y1[i] - My)^2, i = 1 .. n))
# Приближение с помощью функции с нелинейной зависимостью от параметра
g := [1; 1; 0]
q := expfit(x1, y1, g) = [61782.3; 6.47432e-7; -61780.3]
Q(t) := q[1]*e^(q[2]*t) + q[3]
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sum((y1[i] - Q(x1[i]))^2, i = 1 .. n) = 0.192
γ := sqrt(1 - sum((y1[i] - Q(x1[i]))^2, i = 1 .. n)/sum((y1[i] - My)^2, i = 1 .. n)) = 0.2
lg := lgsfit(x1, y1, g) = [7.53264e-7; -1; -5.93305e-9]
LG(t) := lg[1]/(1 + lg[2]*e^(-lg[3]*t))
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sum((y1[i] - LG(x1[i]))^2, i = 1 .. n) = 0.193055
γ := sqrt(1 - sum((y1[i] - LG(x1[i]))^2, i = 1 .. n)/sum((y1[i] - My)^2, i = 1 .. n)) = 0.186353
sn := sinfit(x1, y1, g) = [0.497559; 0.985685; 1.86493]
SN(t) := sn[1]*sin(t + sn[2]) + sn[3]
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sum((y1[i] - SN(x1[i]))^2, i = 1 .. n) = 0.0356175
γ := sqrt(1 - sum((y1[i] - SN(x1[i]))^2, i = 1 .. n)/sum((y1[i] - My)^2, i = 1 .. n)) = 0.906594
pl := pwrfit(x1, y1, g)  # error: Значение должно быть больше или равно 0.
PL(t) := pl[1]*t^pl[2] + pl[3]
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sum((y1[i] - PL(x1[i]))^2, i = 1 .. n) =  # error
γ := sqrt(1 - sum((y1[i] - PL(x1[i]))^2, i = 1 .. n)/sum((y1[i] - My)^2, i = 1 .. n))
g := [1; 0; 0]
l1 := logfit(x1, y1, g)  # error: Это вычисление не приближается к решению.
L(t) := l1[1]*ln(t + l1[2]) + l1[3]
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sum((y1[i] - L(x1[i]))^2, i = 1 .. n) =  # error
γ := sqrt(1 - sum((y1[i] - L(x1[i]))^2, i = 1 .. n)/sum((y1[i] - My)^2, i = 1 .. n))
