# Worksheet setting: ORIGIN = 1
÷
# Лабораторная работа №6
#
# «Аппроксимация и интерполяция функций»
# Интерполяция
Gauss(A, b, n) :=
    for i ∈ 1 .. n
        for j ∈ 1 .. n
            A0[i, j] ← A[i, j]
        b0[i] ← b[i]
    for k ∈ 1 .. n - 1
        if A[k, k] == 0
            m ← k + 1
            while m ≤ n and A[m, k] == 0
                m ← m + 1
            return "система не обусловлена" if m > n
            for j ∈ 1 .. n
                R ← A[m, j]
                A[m, j] ← A[k, j]
                A[k, j] ← R
            R ← b[m]
            b[m] ← b[k]
            b[k] ← R
        for i ∈ k + 1 .. n
            q[i] ← A[i, k]/A[k, k]
            for j ∈ k .. n
                A[i, j] ← A[i, j] - q[i]*A[k, j]
            b[i] ← b[i] - q[i]*b[k]
    x[n] ← b[n]/A[n, n]
    for i ∈ n - 1, n - 2 .. 1
        s ← 0
        for j ∈ i + 1 .. n
            s ← s + A[i, j]*x[j]
        x[i] ← (b[i] - s)/A[i, i]
    for i ∈ 1 .. n
        s ← 0
        for j ∈ 1 .. n
            s ← s + A0[i, j]*x[j]
        δ[i] ← b0[i] - s
    [x; A; δ]
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x := [0.41; 0.46; 0.52; 0.60; 0.65; 0.72]
y := [2.57418; 2.32513; 2.09336; 1.86203; 1.74926; 1.62098]
n := 6
Lg(x, y, t) :=
    s ← 0
    for i ∈ 1 .. n
        p ← 1
        for j ∈ 1 .. n
            p ← p*(t - x[j])/(x[i] - x[j]) if i ≠ j
        s ← s + y[i]*p
    s
p := pspline(x, y)
P(t) := interp(p, x, y, t)
l1 := lspline(x, y) = [0; 3; 0; 0; 27.1225; 12.3673; 9.21307; 8.65133; 0]
c1 := cspline(x, y)
C(t) := interp(c1, x, y, t)
L1(t) := interp(l1, x, y, t)
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# Аппроксимация
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n := 8
x1 := [1.54; 1.91; 2.28; 2.65; 3.02; 3.39; 3.76; 4.13]
y1 := [-2.52; -3.08; -3.54; -3.93; -4.27; -4.57; -4.84; -5.09]
A := [n, sum(x1[i], i = 1 .. n); sum(x1[i], i = 1 .. n), sum(x1[i]^2, i = 1 .. n)]
b := [sum(y1[i], i = 1 .. n); sum(x1[i]*y1[i], i = 1 .. n)]
A = [8, 22.68; 22.68, 70.0476]
b = [-31.84; -95.8571]
Gauss(A, b, 2) = [[-1.22345; -0.972329]; [8, 22.68; 0, 5.7498]; [0; -1.42109e-14]]
A := augment(x1, y1) = [
    1.54, -2.52;
    1.91, -3.08;
    2.28, -3.54;
    2.65, -3.93;
    3.02, -4.27;
    3.39, -4.57;
    3.76, -4.84;
    4.13, -5.09
]
A1 := csort(A, 1) = [
    1.54, -2.52;
    1.91, -3.08;
    2.28, -3.54;
    2.65, -3.93;
    3.02, -4.27;
    3.39, -4.57;
    3.76, -4.84;
    4.13, -5.09
]
x2 := A1[:, 1] = [1.54; 1.91; 2.28; 2.65; 3.02; 3.39; 3.76; 4.13]
y2 := A1[:, 2] = [-2.52; -3.08; -3.54; -3.93; -4.27; -4.57; -4.84; -5.09]
# Линейная регрессия
a := line(x1, y1) = [-1.22345; -0.972329]  # возвращает массив функции линейной регрессии
intercept(x1, y1) = -1.22345
slope(x1, y1) = -0.972329
f(t) := a[1] + a[2]*t
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sum((y1[i] - f(x1[i]))^2, i = 1 .. n) = 0.105598
Mx := mean(x1)  # r - коэффициент корреляции характеризует тесноту линейной связи между абсциссой х и ординатой у и лежит в пределах от -1 до 1
My := mean(y1)
μ := sum((x1[i] - Mx)*(y1[i] - My), i = 1 .. n)/sqrt(sum((x1[i] - Mx)^2, i = 1 .. n)*sum((y1[i] - My)^2, i = 1 .. n)) = -0.990426
corr(x1, y1) = -0.990426
# Полиномиальная регрессия
# возвращает вектор коэффициентов полинома к ой степени рассчитаной методо наименьших квадратов для ветора абсцисс х ветора ординах у. элементы массива х упорядоченны по возрастанию
regress(x, y, 2)
interp(s, x, y, t)  # она вычисляет значение полинома в точке т для табличной функции с массивом абсцисс х и ординат у s-массив коэф найденного функцией regress
c := regress(x1, y1, 2)
C(t) := interp(c, x1, y1, t)
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sum((y1[i] - C(x1[i]))^2, i = 1 .. n) = 0.00357619
γ := sqrt(1 - sum((y1[i] - C(x1[i]))^2, i = 1 .. n)/sum((y1[i] - My)^2, i = 1 .. n)) = 0.999677
# Полином 3-ей степени
d := regress(x1, y1, 3)
D(t) := interp(d, x1, y1, t)
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sum((y1[i] - D(x1[i]))^2, i = 1 .. n) = 8.52814e-5
γ := sqrt(1 - sum((y1[i] - D(x1[i]))^2, i = 1 .. n)/sum((y1[i] - My)^2, i = 1 .. n)) = 0.999992
# Аппроксимация с помощью линейной комбинации линейно независимых функций
linfit(x, y, F)  # возращает вектор коэф К для массива абсцисс х и ординах у таблично заданной F ветор функция содержащая набор ЛНЗ функций
F(t) := [1; t; t^3; t^5; t^7]
k := linfit(x1, y1, F) = [0.583505; -2.23918; 0.104486; -0.00465571; 8.82483e-5]
z(t) := k*F(t)
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sum((y1[i] - z(x1[i]))^2, i = 1 .. n) = 5.89051e-5
γ := sqrt(1 - sum((y1[i] - z(x1[i]))^2, i = 1 .. n)/sum((y1[i] - My)^2, i = 1 .. n)) = 0.999995
# Приближение с помощью функции с нелинейной зависимостью от параметра
g := [1; 1; 0]
q := expfit(x1, y1, g) = [7.28873; -0.380236; -6.5911]
Q(t) := q[1]*e^(q[2]*t) + q[3]
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sum((y1[i] - Q(x1[i]))^2, i = 1 .. n) = 0.00102304
γ := sqrt(1 - sum((y1[i] - Q(x1[i]))^2, i = 1 .. n)/sum((y1[i] - My)^2, i = 1 .. n)) = 0.999908
lg := lgsfit(x1, y1, g) = [-5.61157; 4.85006; 0.914595]
LG(t) := lg[1]/(1 + lg[2]*e^(-lg[3]*t))
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sum((y1[i] - LG(x1[i]))^2, i = 1 .. n) = 0.00899312
γ := sqrt(1 - sum((y1[i] - LG(x1[i]))^2, i = 1 .. n)/sum((y1[i] - My)^2, i = 1 .. n)) = 0.999188
sn := sinfit(x1, y1, g) = [1.26605; 0.641827; -3.69812]
SN(t) := sn[1]*sin(t + sn[2]) + sn[3]
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sum((y1[i] - SN(x1[i]))^2, i = 1 .. n) = 0.0793329
γ := sqrt(1 - sum((y1[i] - SN(x1[i]))^2, i = 1 .. n)/sum((y1[i] - My)^2, i = 1 .. n)) = 0.992816
pl := pwrfit(x1, y1, g) = [-237.495; 0.0108444; 236.089]
PL(t) := pl[1]*t^pl[2] + pl[3]
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# данный вариант приближения функции наилучший для исходной таблично заданной функции среди рассмотренных
sum((y1[i] - PL(x1[i]))^2, i = 1 .. n) = 1.78293e-5
γ := sqrt(1 - sum((y1[i] - PL(x1[i]))^2, i = 1 .. n)/sum((y1[i] - My)^2, i = 1 .. n)) = 0.999998
l1 := logfit(x1, y1, g) = [-2.62601; 0.0230079; -1.34812]
L(t) := l1[1]*ln(t + l1[2]) + l1[3]
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sum((y1[i] - L(x1[i]))^2, i = 1 .. n) = 1.96912e-5
γ := sqrt(1 - sum((y1[i] - L(x1[i]))^2, i = 1 .. n)/sum((y1[i] - My)^2, i = 1 .. n)) = 0.999998
